№1
x := 2
n := 11
y := (sqrt(x^3 + n) + cos(|n*x - 1|))*sin(π*n/2)^2/(nthroot(x^5 + 8*x + n, 4)*cos(π/4*(x + n)))
y = -1.94473
№2
f(x) := (x^2 - n*x + cos(x))*sqrt(|x - sin(n*x)|)
x1 := -2
x2 := 2
Δx := 0.4
x := x1, x1 + Δx .. x2
f(x) = [36.261; 32.139; 11.6973; 4.7011; 6.3722; 6.664e-8; -3.85855; -3.46125; -8.8867; -24.0581; -26.1019]
№3
A := READPRN("Mas_A.txt")
a := -2*n
b := 2*n
A = [1, 2, 3; 4, 5, 6; 7, 8, 9]
B := [1, 4, 7, 2; 3, 4, 5, 5; 9, 3, 1, 8]
V := [rnd(1)*(b - a) + a; rnd(1)*(b - a) + a; rnd(1)*(b - a) + a] = [-6.58644; 14.2049; -14.3383]
V := runif(3, a, b) = [9.2618; -8.62461; -17.9779]
Amax := max(A)
Amin := min(A)
ΔA := Amax - Amin
Amax = 9
Amin = 1
ΔA = 8
ORIGIN := 1
sB := sum(sum(B[r, c], c = 1 .. cols(B)), r = 1 .. rows(B))/(rows(B)*cols(B))
sB = 4.33333
W := [max(B[:, 1]); max(B[:, 2]); max(B[:, 3])] = [9; 4; 7]
№4
A := [n, n + 1, n + 2; n - 3, n - 2, n; n - 1, n, n + 1]
B := [6*n + 8; 6*n - 7; 6*n + 2]
[x; y; z] := A^-1*B
x = 1
y = 2
z = 3
X := [x; y; z]
X = [1; 2; 3]
№5
x1 := -3*π
x2 := 3*π
y(x) := e^(-(|x|/3))*cos(x)
x := x1, x1 + Δx .. x2
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№6
f1(x) := e^x*x^3
f2(x) := e^(-x)*x^3
Δx := 0.25
x1 := -9
x2 := 0
x := x1, x1 + Δx .. x2
t := x2, x2 + Δx .. 9
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№7
g(x) := sqrt(x)*sin(x)
x1 := 0
x2 := 20
Δx := 0.1
Nx := (x2 - x1)/Δx
Nx = 200
ORIGIN := 0
i := 0 .. Nx
x[i] := x1 + i*Δx
y[i] := g(x[i])
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№8
q(x) := e^(-x^2)
x1 := -3
x2 := 3
x := x1, x1 + Δx .. x2
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№9
x1 := -15
x2 := 15
Nx := 43
f(x, y) := sin(sqrt(x^2 + y^2))/sqrt(x^2 + y^2)
y1 := -15
y2 := 15
Ny := 43
# [component: inputs f]
